// SBML level 3 version 1

function HK_kinetics(Vmax, A, B, Kglc, Katp, P, Q, Keq, Kg6p, Kadp)
  Vmax*(A*B/(Kglc*Katp) - P*Q/(Kglc*Katp*Keq))/((1 + A/Kglc + P/Kg6p)*(1 + B/Katp + Q/Kadp));
end

function PGI_kinetics(Vmax, A, Kg6p, P, Keq, Kf6p)
  Vmax*(A/Kg6p - P/(Kg6p*Keq))/(1 + A/Kg6p + P/Kf6p);
end

function PFK_kinetics(Vmax, gR, F6P, Kf6p, ATP, Katp, L0, Ciatp, Kiatp, Camp, AMP, Kamp, Cf26, F26BP, Kf26, Cf16, F16P, Kf16, Catp)
  Vmax*(gR*(F6P/Kf6p)*(ATP/Katp)*(1 + F6P/Kf6p + ATP/Katp + gR*F6P/Kf6p*ATP/Katp)/((1 + F6P/Kf6p + ATP/Katp + gR*F6P/Kf6p*ATP/Katp)^2 + L0*((1 + Ciatp*ATP/Kiatp)/(1 + ATP/Kiatp))^2*((1 + Camp*AMP/Kamp)/(1 + AMP/Kamp))^2*((1 + Cf26*F26BP/Kf26 + Cf16*F16P/Kf16)/(1 + F26BP/Kf26 + F16P/Kf16))^2*(1 + Catp*ATP/Katp)^2));
end

function ALD_kinetics(Vmax, A, Kf16bp, P, Q, Keq, Kdhap, Kgap, Kigap)
  Vmax*(A/Kf16bp - P*Q/(Kf16bp*Keq))/(1 + A/Kf16bp + P/Kdhap + Q/Kgap + A*Q/(Kf16bp*Kigap) + P*Q/(Kdhap*Kgap));
end

function GAPDH_kinetics(C, Vmaxf, A, B, Kgap, Knad, Vmaxr, P, Q, Kbpg, Knadh)
  C*(Vmaxf*A*B/(Kgap*Knad) - Vmaxr*P*Q/(Kbpg*Knadh))/((1 + A/Kgap + P/Kbpg)*(1 + B/Knad + Q/Knadh));
end

function PGK_kinetics(Vmax, Keq, A, B, P, Q, Kp3g, Katp, Kbpg, Kadp)
  Vmax*((Keq*A*B - P*Q)/(Kp3g*Katp))/((1 + A/Kbpg + P/Kp3g)*(1 + B/Kadp + Q/Katp));
end

function PGM_kinetics(Vmax, A, Kp3g, P, Keq, Kp2g)
  Vmax*(A/Kp3g - P/(Kp3g*Keq))/(1 + A/Kp3g + P/Kp2g);
end

function ENO_kinetics(Vmax, A, Kp2g, P, Keq, Kpep)
  Vmax*(A/Kp2g - P/(Kp2g*Keq))/(1 + A/Kp2g + P/Kpep);
end

function PYK_kinetics(Vmax, A, B, Kpep, Kadp, P, Q, Keq, Kpyr, Katp)
  Vmax*(A*B/(Kpep*Kadp) - P*Q/(Kpep*Kadp*Keq))/((1 + A/Kpep + P/Kpyr)*(1 + B/Kadp + Q/Katp));
end

function PDC_kinetics(Vmax, A, Kpyr, nH)
  Vmax*(A/Kpyr)^nH/(1 + (A/Kpyr)^nH);
end

function ADH_kinetics(Vmax, A, B, Ketoh, Kinad, P, Q, Keq, Knad, Knadh, Kinadh, Kacald, Kiacald, Kietoh)
  Vmax*(A*B/(Ketoh*Kinad) - P*Q/(Ketoh*Kinad*Keq))/(1 + B/Kinad + A*Knad/(Kinad*Ketoh) + P*Knadh/(Kinadh*Kacald) + Q/Kinadh + A*B/(Kinad*Ketoh) + B*P*Knadh/(Kinad*Kinadh*Kacald) + A*Q*Knad/(Kinad*Kinadh*Ketoh) + P*Q/(Kacald*Kinadh) + A*B*P/(Kinad*Kiacald*Ketoh) + A*P*Q/(Kietoh*Kinadh*Kacald));
end

function ATPase_0(Katpase, ATP)
  Katpase*ATP;
end

function G3PDH_kinetics(Vmax, A, Kdhap, B, Knadh, P, Q, Keq, Kglycerol, Knad)
  Vmax*(A/Kdhap*(B/Knadh) - P/Kdhap*(Q/Knadh)*(1/Keq))/((1 + A/Kdhap + P/Kglycerol)*(1 + B/Knadh + Q/Knad));
end

function Glycogen_synthesis_kinetics(KGLYCOGEN)
  KGLYCOGEN;
end

function Trehalose_synthesis_kinetics(Ktrehalose)
  Ktrehalose;
end

function Succinate_kinetics(k, A)
  k*A;
end

function HXT_kinetics(Vmax, A, B, Kglc, Ki)
  Vmax*(A - B)/Kglc/(1 + (A + B)/Kglc + Ki*A*B/Kglc^2);
end

model Yeast_glycolysis_model_of_Pritchard_and_Kell()
  // From Pritchard and Kell (2002) Eur. J. Biochem. , modified from Teusink et al. (2000) Eur J Biochem 267, 5313-5329.
  // This version uses the Vmaxes found by the best fit (R1) of Table 1 of the Pritchard and Kell paper, and simulates a decrease of external glucose concentration from 100 to 2 mM
  // model units - substance: substance, time: time, volume: volume, area: area, length: length, extent: substance

  // Compartments:
  compartment compartment = 1 volume;

  // Species:
  species GLCi in compartment = 0.09765232;
  species ATP in compartment = 2.525132;
  species G6P in compartment = 2.675045;
  species ADP in compartment = 1.281988;
  species F6P in compartment = 0.6249771;
  species F16bP in compartment = 6.221326;
  species AMP in compartment = 0.2928842;
  species DHAP in compartment = 1.004153;
  species GAP in compartment = 0.04518094;
  species NAD in compartment = 1.503291;
  species BPG in compartment = 0.0007368742;
  species NADH in compartment = 0.0867097;
  species P3G in compartment = 0.8856884;
  species P2G in compartment = 0.1276958;
  species PEP in compartment = 0.06323515;
  species PYR in compartment = 1.815318;
  species AcAld in compartment = 0.178141;
  species $Succinate in compartment = 0;
  species $Trehalose in compartment = 0;
  species $Glycogen in compartment = 0;
  species $Glycerol in compartment = 0.15;
  species $EtOH in compartment = 49.99999;
  species $CO2 in compartment = 0.9999999;
  species $F26bP in compartment = 0.02000003;
  species $GLCo in compartment = 2.000003;

  // Reactions:
  HXT: $GLCo -> GLCi; compartment*HXT_kinetics(HXT_Vmax, GLCo, GLCi, HXT_Kglc, Ki);
    HXT_Vmax = 97.24; HXT_Kglc = 1.1918; Ki = 0.91;
  HK: GLCi + ATP -> G6P + ADP; compartment*HK_kinetics(HK_Vmax, GLCi, ATP, HK_Kglc, HK_Katp, G6P, ADP, HK_Keq, HK_Kg6p, HK_Kadp);
    HK_Vmax = 236.7; HK_Kglc = 0.08; HK_Katp = 0.15; HK_Keq = 2000; HK_Kg6p = 30; HK_Kadp = 0.23;
  PGI: G6P -> F6P; compartment*PGI_kinetics(PGI_Vmax, G6P, PGI_Kg6p, F6P, PGI_Keq, PGI_Kf6p);
    PGI_Vmax = 1056; PGI_Kg6p = 1.4; PGI_Keq = 0.29; PGI_Kf6p = 0.3;
  PFK: F6P + ATP => F16bP + ADP; compartment*PFK_kinetics(PFK_Vmax, gR, F6P, PFK_Kf6p, ATP, PFK_Katp, L0, Ciatp, Kiatp, Camp, AMP, Kamp, Cf26, F26bP, Kf26, Cf16, F16bP, Kf16, Catp);  // modifiers: AMP, F26bP
    PFK_Vmax = 110; gR = 5.12; PFK_Kf6p = 0.1; PFK_Katp = 0.71; L0 = 0.66; Ciatp = 100; Kiatp = 0.65; Camp = 0.0845; Kamp = 0.0995; Cf26 = 0.0174; Kf26 = 0.000682; Cf16 = 0.397; Kf16 = 0.111; Catp = 3;
  ALD: F16bP -> DHAP + GAP; compartment*ALD_kinetics(ALD_Vmax, F16bP, Kf16bp, DHAP, GAP, ALD_Keq, ALD_Kdhap, ALD_Kgap, Kigap);
    ALD_Vmax = 94.69; Kf16bp = 0.3; ALD_Keq = 0.069; ALD_Kdhap = 2; ALD_Kgap = 2.4; Kigap = 10;
  TPI: DHAP -> GAP; compartment*(TPI_k1*DHAP - TPI_k2*GAP);
    TPI_k1 = 450000; TPI_k2 = 10000000;
  GAPDH: GAP + NAD -> BPG + NADH; compartment*GAPDH_kinetics(C, Vmaxf, GAP, NAD, GAPDH_Kgap, GAPDH_Knad, Vmaxr, BPG, NADH, GAPDH_Kbpg, GAPDH_Knadh);
    C = 1; Vmaxf = 1152; GAPDH_Kgap = 0.21; GAPDH_Knad = 0.09; Vmaxr = 6719; GAPDH_Kbpg = 0.0098; GAPDH_Knadh = 0.06;
  PGK: BPG + ADP -> P3G + ATP; compartment*PGK_kinetics(PGK_Vmax, PGK_Keq, BPG, ADP, P3G, ATP, PGK_Kp3g, PGK_Katp, PGK_Kbpg, PGK_Kadp);
    PGK_Vmax = 1288; PGK_Keq = 3200; PGK_Kp3g = 0.53; PGK_Katp = 0.3; PGK_Kbpg = 0.003; PGK_Kadp = 0.2;
  PGM: P3G -> P2G; compartment*PGM_kinetics(PGM_Vmax, P3G, PGM_Kp3g, P2G, PGM_Keq, PGM_Kp2g);
    PGM_Vmax = 2585; PGM_Kp3g = 1.2; PGM_Keq = 0.19; PGM_Kp2g = 0.08;
  ENO: P2G -> PEP; compartment*ENO_kinetics(ENO_Vmax, P2G, ENO_Kp2g, PEP, ENO_Keq, ENO_Kpep);
    ENO_Vmax = 201.6; ENO_Kp2g = 0.04; ENO_Keq = 6.7; ENO_Kpep = 0.5;
  PYK: PEP + ADP -> PYR + ATP; compartment*PYK_kinetics(PYK_Vmax, PEP, ADP, PYK_Kpep, PYK_Kadp, PYR, ATP, PYK_Keq, PYK_Kpyr, PYK_Katp);
    PYK_Vmax = 1000; PYK_Kpep = 0.14; PYK_Kadp = 0.53; PYK_Keq = 6500; PYK_Kpyr = 21; PYK_Katp = 1.5;
  PDC: PYR => AcAld + $CO2; compartment*PDC_kinetics(PDC_Vmax, PYR, PDC_Kpyr, nH);
    PDC_Vmax = 857.8; PDC_Kpyr = 4.33; nH = 1.9;
  ADH: $EtOH + NAD -> AcAld + NADH; compartment*ADH_kinetics(ADH_Vmax, EtOH, NAD, Ketoh, Kinad, AcAld, NADH, ADH_Keq, ADH_Knad, ADH_Knadh, Kinadh, Kacald, Kiacald, Kietoh);
    ADH_Vmax = 209.5; Ketoh = 17; Kinad = 0.92; ADH_Keq = 6.9e-5; ADH_Knad = 0.17; ADH_Knadh = 0.11; Kinadh = 0.031; Kacald = 1.11; Kiacald = 1.1; Kietoh = 90;
  ATPase: ATP => ADP; compartment*ATPase_0(Katpase, ATP);
    Katpase = 39.5;
  AK: 2 ADP -> ATP + AMP; compartment*(AK_k1*ADP^2 - AK_k2*ATP*AMP);
    AK_k1 = 45; AK_k2 = 100;
  G3PDH: DHAP + NADH => $Glycerol + NAD; compartment*G3PDH_kinetics(G3PDH_Vmax, DHAP, G3PDH_Kdhap, NADH, G3PDH_Knadh, Glycerol, NAD, G3PDH_Keq, Kglycerol, G3PDH_Knad);
    G3PDH_Vmax = 47.11; G3PDH_Kdhap = 0.4; G3PDH_Knadh = 0.023; G3PDH_Keq = 4300; Kglycerol = 1; G3PDH_Knad = 0.93;
  Glycogen_Branch: G6P + ATP => ADP + $Glycogen; compartment*Glycogen_synthesis_kinetics(KGLYCOGEN);
    KGLYCOGEN = 6;
  Trehalose_Branch: 2 G6P + ATP => ADP + $Trehalose; compartment*Trehalose_synthesis_kinetics(Ktrehalose);
    Ktrehalose = 2.4;
  Succinate_Branch: 2 AcAld + 3 NAD => $Succinate + 3 NADH; compartment*Succinate_kinetics(k, AcAld);
    k = 21.4;

  // Unit definitions:
  unit length = metre;
  unit area = metre^2;
  unit volume = 1e-3 litre;
  unit time = 60 second;
  unit substance = 1e-3 mole;
end
