// SBML level 3 version 1

function Function_for_PGI(F6P, G6P, Keq, Kf6p, Kg6p, kcat)
  1*kcat*(G6P/Kg6p - F6P/(Kg6p*Keq))/(1 + G6P/Kg6p + F6P/Kf6p);
end

function Function_for_GND(Knadp_GND1, Knadp_GND2, Knadph_GND1, Knadph_GND2, Kp6g_GND1, Kp6g_GND2, Kru5p_GND1, Kru5p_GND2, NADP, NADPH, P6G, Ru5P, kcat_GND1, kcat_GND2)
  1*kcat_GND1*P6G*NADP/(Kp6g_GND1*Knadp_GND1)/((1 + P6G/Kp6g_GND1 + Ru5P/Kru5p_GND1)*(1 + NADP/Knadp_GND1 + NADPH/Knadph_GND1)) + 1*kcat_GND2*P6G*NADP/((1 + P6G/Kp6g_GND2 + Ru5P/Kru5p_GND2)*(1 + NADP/Knadp_GND2 + NADPH/Knadph_GND2));
end

function Function_for_RKI(Keq, Kr5p, Kru5p, R5P, Ru5P, kcat)
  1*kcat*(Ru5P - R5P/Keq)/Kru5p/(1 + Ru5P/Kru5p + R5P/Kr5p);
end

function Function_for_RPE(Keq, Kru5p, Kx5p, Ru5P, X5P, kcat)
  1*kcat*(Ru5P - X5P/Keq)/Kru5p/(1 + Ru5P/Kru5p + X5P/Kx5p);
end

function Function_for_SOL(G6L, Kg6l, Kp6g, P6G, kcat)
  1*kcat*G6L/Kg6l/(1 + G6L/Kg6l + P6G/Kp6g);
end

function Function_for_TAL(E4P, F6P, GAP, Ke4p_NQM1, Ke4p_TAL1, Keq, Kf6p_NQM1, Kf6p_TAL1, Kgap_NQM1, Kgap_TAL1, Ks7p_NQM1, Ks7p_TAL1, S7P, kcat_NQM1, kcat_TAL1)
  1*kcat_TAL1*(GAP*S7P - F6P*E4P/Keq)/(Kgap_TAL1*Ks7p_TAL1)/((1 + GAP/Kgap_TAL1 + F6P/Kf6p_TAL1)*(1 + S7P/Ks7p_TAL1 + E4P/Ke4p_TAL1)) + 1*kcat_NQM1*(GAP*S7P - F6P*E4P/Keq)/(Kgap_NQM1*Ks7p_NQM1)/((1 + GAP/Kgap_NQM1 + F6P/Kf6p_NQM1)*(1 + S7P/Ks7p_NQM1 + E4P/Ke4p_NQM1));
end

function Function_for_TKL_E4P_F6P(E4P, F6P, GAP, Ke4p_TAL, Keq, Kf6p_TAL, Kgap_TAL, Kr5p_TAL, Ks7p_TAL, Kx5p_TAL, R5P, S7P, X5P, kcat)
  1*kcat*(X5P*E4P - GAP*F6P/Keq)/(Kx5p_TAL*Ke4p_TAL)/((1 + X5P/Kx5p_TAL + GAP/Kgap_TAL)*(1 + E4P/Ke4p_TAL + F6P/Kf6p_TAL + R5P/Kr5p_TAL + S7P/Ks7p_TAL));
end
Function_for_TKL_E4P_F6P is "Function for TKL (E4P:F6P)";

function Function_for_TKL_R5P_S7P(E4P, F6P, GAP, Ke4p_TAL, Keq, Kf6p_TAL, Kgap_TAL, Kr5p_TAL, Ks7p_TAL, Kx5p_TAL, R5P, S7P, X5P, kcat)
  1*kcat*(X5P*R5P - GAP*S7P/Keq)/(Kx5p_TAL*Kr5p_TAL)/((1 + X5P/Kx5p_TAL + GAP/Kgap_TAL)*(1 + E4P/Ke4p_TAL + F6P/Kf6p_TAL + R5P/Kr5p_TAL + S7P/Ks7p_TAL));
end
Function_for_TKL_R5P_S7P is "Function for TKL (R5P:S7P)";

function Function_for_ZWF(G6L, G6P, Kg6l, Kg6p, Knadp, Knadph, NADP, NADPH, kcat)
  1*kcat*G6P*NADP/(Kg6p*Knadp)/((1 + G6P/Kg6p + G6L/Kg6l)*(1 + NADP/Knadp + NADPH/Knadph));
end

model Yeast_Pentose_Phosphate_Pathway()
  // taxonomy:4932
  // model units - substance: substance, time: time, volume: volume, area: area, length: length, extent: substance

  // Compartments:
  compartment cell = 1 volume;  // GO:0005829

  // Species:
  species F6P in cell = 0.2354412;  // kegg.compound:C05345; CHEBI:16084
  species G6P in cell = 0.7724832;  // CHEBI:17665; kegg.compound:C00668
  species GAP in cell = 0.315891;  // CHEBI:29052; kegg.compound:C00118
  species E4P in cell = 0.029;  // kegg.compound:C00279
  species G6L in cell = 0.1;  // kegg.compound:C01236
  species NADPH in cell = 0.16;  // kegg.compound:C00005
  species P6G in cell = 0.25;  // kegg.compound:C00345
  species R5P in cell = 0.118;  // kegg.compound:C03736
  species Ru5P in cell = 0.033;  // kegg.compound:C00199
  species S7P in cell = 0.082;  // kegg.compound:C05382
  species X5P in cell = 0.041;  // kegg.compound:C00231
  species NADP in cell = 0.17;  // kegg.compound:C00006

  // Parameters:
  sum_AxP = 6.02;
  sum_NADP = 0.33;
  Kx5p_TAL = 0.67;
  Ke4p_TAL = 0.946;
  Kr5p_TAL = 0.235;
  Kgap_TAL = 0.1;
  Kf6p_TAL = 1.1;
  Ks7p_TAL = 0.15;

  // Reactions:
  PGI: G6P -> F6P; cell*Function_for_PGI(F6P, G6P, PGI_Keq, Kf6p, PGI_Kg6p, PGI_kcat);  // kegg.reaction:R00771; isVersionOf ec-code:5.3.1.9; isVersionOf GO:0004347
    PGI_Keq = 0.29; Kf6p = 0.307; PGI_Kg6p = 1.0257; PGI_kcat = 487.36;
  GND: P6G + NADP => Ru5P + NADPH; cell*Function_for_GND(Knadp_GND1, Knadp_GND2, Knadph_GND1, Knadph_GND2, Kp6g_GND1, Kp6g_GND2, Kru5p_GND1, Kru5p_GND2, NADP, NADPH, P6G, Ru5P, kcat_GND1, kcat_GND2);  // ec-code:1.1.1.44
    Knadp_GND1 = 0.094; Knadp_GND2 = 0.094; Knadph_GND1 = 0.055; Knadph_GND2 = 0.055; Kp6g_GND1 = 0.062; Kp6g_GND2 = 0.115; Kru5p_GND1 = 0.1; Kru5p_GND2 = 0.1; kcat_GND1 = 28; kcat_GND2 = 27.3;
  RKI: Ru5P -> R5P; cell*Function_for_RKI(RKI_Keq, Kr5p, RKI_Kru5p, R5P, Ru5P, RKI_kcat);  // ec-code:5.3.1.6
    RKI_Keq = 4; Kr5p = 5.7; RKI_Kru5p = 2.47; RKI_kcat = 335;
  RPE: Ru5P -> X5P; cell*Function_for_RPE(RPE_Keq, RPE_Kru5p, Kx5p, Ru5P, X5P, RPE_kcat);  // ec-code:5.1.3.1
    RPE_Keq = 1.4; RPE_Kru5p = 5.97; Kx5p = 7.7; RPE_kcat = 4020;
  SOL: G6L => P6G; cell*Function_for_SOL(G6L, SOL_Kg6l, Kp6g, P6G, SOL_kcat);  // ec-code:3.1.1.31
    SOL_Kg6l = 0.8; Kp6g = 0.5; SOL_kcat = 4.3;
  TAL: GAP + S7P -> F6P + E4P; cell*Function_for_TAL(E4P, F6P, GAP, Ke4p_NQM1, Ke4p_TAL1, TAL_Keq, Kf6p_NQM1, Kf6p_TAL1, Kgap_NQM1, Kgap_TAL1, Ks7p_NQM1, Ks7p_TAL1, S7P, kcat_NQM1, kcat_TAL1);  // ec-code:2.2.1.2
    Ke4p_NQM1 = 0.305; Ke4p_TAL1 = 0.362; TAL_Keq = 1.05; Kf6p_NQM1 = 1.04; Kf6p_TAL1 = 1.44; Kgap_NQM1 = 0.272; Kgap_TAL1 = 0.272; Ks7p_NQM1 = 0.786; Ks7p_TAL1 = 0.786; kcat_NQM1 = 0.694; kcat_TAL1 = 0.694;
  TKL_E4P: X5P + E4P -> GAP + F6P; cell*Function_for_TKL_E4P_F6P(E4P, F6P, GAP, Ke4p_TAL, TKL_E4P_Keq, Kf6p_TAL, Kgap_TAL, Kr5p_TAL, Ks7p_TAL, Kx5p_TAL, R5P, S7P, X5P, TKL_E4P_kcat); TKL_E4P is "TKL (E4P:F6P)";  // modifiers: R5P, S7P; ec-code:2.2.1.1
    TKL_E4P_Keq = 10; TKL_E4P_kcat = 47.1;
  TKL_R5P: X5P + R5P -> GAP + S7P; cell*Function_for_TKL_R5P_S7P(E4P, F6P, GAP, Ke4p_TAL, TKL_R5P_Keq, Kf6p_TAL, Kgap_TAL, Kr5p_TAL, Ks7p_TAL, Kx5p_TAL, R5P, S7P, X5P, TKL_R5P_kcat); TKL_R5P is "TKL (R5P:S7P)";  // modifiers: E4P, F6P; ec-code:2.2.1.1
    TKL_R5P_Keq = 1.2; TKL_R5P_kcat = 40.5;
  ZWF: G6P + NADP => G6L + NADPH; cell*Function_for_ZWF(G6L, G6P, ZWF_Kg6l, ZWF_Kg6p, Knadp, Knadph, NADP, NADPH, ZWF_kcat);  // ec-code:1.1.1.49
    ZWF_Kg6l = 0.01; ZWF_Kg6p = 0.042; Knadp = 0.045; Knadph = 0.017; ZWF_kcat = 189;
  NADPH_oxidase: NADPH => NADP; cell*NADPH_oxidase_k1*NADPH;
    NADPH_oxidase_k1 = 1;
  E4P_sink: E4P => ; cell*E4P_sink_k1*E4P;
    E4P_sink_k1 = 1;
  R5P_sink: R5P => ; cell*R5P_sink_k1*R5P;
    R5P_sink_k1 = 1;

  // Unit definitions:
  unit length = metre;
  unit area = metre^2;
  unit volume = litre;
  unit time = second;
  unit substance = 1e-3 mole;
end
